<neuroml xmlns="http://www.neuroml.org/schema/neuroml2"  xmlns:xs="http://www.w3.org/2001/XMLSchema" xmlns:xsi="http://www.w3.org/2001/XMLSchema-instance" xsi:schemaLocation="http://www.neuroml.org/schema/neuroml2 https://raw.github.com/NeuroML/NeuroML2/development/Schemas/NeuroML2/NeuroML_v2.1.xsd" id="C66A_scaled_exp_resample_5">
    <include href="channels/na_s.channel.nml"/>
    <include href="channels/kdr.channel.nml"/>
    <include href="channels/k.channel.nml"/>
    <include href="channels/cal.channel.nml"/>
    <include href="channels/cah.channel.nml"/>
    <include href="channels/kca.channel.nml"/>
    <include href="channels/h.channel.nml"/>
    <include href="channels/ca_0.1um.nml"/>
    <include href="channels/cacc.channel.nml"/>
    <include href="channels/na_a.channel.nml"/>
    <include href="channels/leak.channel.nml"/>
    <cell id="C66A">
        <notes>Cell morphology generated by neuroConstruct from file: C66A_scaled_exp_resample_5.swc
        TREES toolbox tree - C66A_scaled_exp_resample_5
        written by an automatic procedure "swc_tree" part of the TREES package
        in MATLAB
        copyright 2009 Hermann Cuntz
        inode R X Y Z D/2 idpar</notes>
        <morphology id="morphology_C66A_scaled_exp_resample_5">
            <segment id="0" name="Comp_1">
                <proximal x="0.000000e+00" y="0.000000e+00" z="0.000000e+00" diameter="15.034"/>
                <distal x="-8.839076e-01" y="7.514769e+00" z="-1.896892e+00" diameter="4.062"/>
            </segment>
            <segment id="1" name="Comp_5">
                <parent segment="0"/>
                <distal x="-2.417208e+00" y="7.170278e+00" z="-3.714138e+00" diameter="5.438"/>
            </segment>
            <segment id="2" name="Comp_2">
                <parent segment="0" fractionAlong="0.0"/>
                <proximal x="0.000000e+00" y="0.000000e+00" z="0.000000e+00" diameter="2.422"/>
                <distal x="4.496748e+00" y="6.395174e+00" z="5.353697e-01" diameter="2.422"/>
            </segment>
            <segment id="3" name="Comp_3">
                <parent segment="0" fractionAlong="0.0"/>
                <proximal x="0.000000e+00" y="0.000000e+00" z="0.000000e+00" diameter="1.8526"/>
                <distal x="-3.763776e+00" y="-7.127368e+00" z="-9.394113e-01" diameter="1.8526"/>
            </segment>
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            <segmentGroup neuroLexId="sao864921383" id="Soma">
                <member segment="0"/>
                <member segment="1"/>
            </segmentGroup>
            <segmentGroup neuroLexId="sao864921383" id="Sec_Comp_2">
                <member segment="2"/>
            </segmentGroup>
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            <segmentGroup neuroLexId="GO:0043025" id="soma_group">
                <include segmentGroup="Soma"/>
            </segmentGroup>
            <segmentGroup neuroLexId="GO:0030424" id="dendrite_group">
                <include segmentGroup="Sec_Comp_2"/>
                <include segmentGroup="Sec_Comp_3"/>
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            </segmentGroup>
            <segmentGroup id="Colour_DarkGrey">
                <include segmentGroup="Sec_Comp_2"/>
                <include segmentGroup="Sec_Comp_3"/>
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            </segmentGroup>
        </morphology>
        <biophysicalProperties id="biophys">
            <membraneProperties>
                <channelDensity id="na_s_soma" ionChannel="na_s" condDensity="30 mS_per_cm2" erev="55 mV" segmentGroup="soma_group" ion="na"/>
                <channelDensity id="kdr_soma" ionChannel="kdr" condDensity="30 mS_per_cm2" erev="-75 mV" segmentGroup="soma_group" ion="k"/>
                <channelDensity id="k_soma" ionChannel="k" condDensity="15 mS_per_cm2" erev="-75 mV" segmentGroup="soma_group" ion="k"/>
                <channelDensity id="cal_soma" ionChannel="cal" condDensity="30 mS_per_cm2" erev="120 mV" segmentGroup="soma_group" ion="ca"/>
                <channelDensity id="cah_dend" ionChannel="cah" condDensity="10 mS_per_cm2" erev="120 mV" segmentGroup="dendrite_group" ion="ca"/>
                <channelDensity id="kca_dend" ionChannel="kca" condDensity="10 mS_per_cm2" erev="-75 mV" segmentGroup="dendrite_group" ion="k"/>
                <channelDensity id="h_dend" ionChannel="h" condDensity="20 mS_per_cm2" erev="-43 mV" segmentGroup="dendrite_group" ion="h"/>
                <channelDensity id="cacc_dend" ionChannel="cacc" condDensity="65 mS_per_cm2" erev="-45 mV" segmentGroup="dendrite_group" ion="cl"/>
                <channelDensity id="leak_all" ionChannel="leak" condDensity="1.3e-2 mS_per_cm2" erev="10 mV" ion="non_specific"/>
                <spikeThresh value="0 mV"/>
                <specificCapacitance value="1 uF_per_cm2"/>
                <initMembPotential value="-65.0 mV"/>
            </membraneProperties>
            <intracellularProperties>
                <species segmentGroup="dendrite_group" id="ca" concentrationModel="ca_conc" ion="ca" initialConcentration="3.7152 mM" initialExtConcentration="3.0mM"/>
                <resistivity value="100 ohm_cm" segmentGroup="soma_group"/>
                <resistivity value="100 ohm_cm" segmentGroup="dendrite_group"/>
            </intracellularProperties>
        </biophysicalProperties>
    </cell>
</neuroml>
