<neuroml xmlns="http://www.neuroml.org/schema/neuroml2"  xmlns:xs="http://www.w3.org/2001/XMLSchema" xmlns:xsi="http://www.w3.org/2001/XMLSchema-instance" xsi:schemaLocation="http://www.neuroml.org/schema/neuroml2 https://raw.github.com/NeuroML/NeuroML2/development/Schemas/NeuroML2/NeuroML_v2.1.xsd" id="net_C66A">
    <include href="C66A.cell.nml"/>
    <pulseGenerator id="iclamp0" delay="0ms" duration="0ms" amplitude="0nA"/>
    <network id="network_of_C66A" type="networkWithTemperature" temperature="37degC">
        <population id="population_of_C66A" component="C66A" size="1" type="populationList">
            <instance id="0">
                <location x="0." y="0." z="0."/>
            </instance>
        </population>
        <inputList id="Iclamp0" population="population_of_C66A" component="iclamp0">
            <input id="0" target="../population_of_C66A/0/C66A" destination="synapses" segmentId="0"/>
        </inputList>
    </network>
</neuroml>
